# Barn door Tracker Stepper motor
# Thread Size, M8
Pitch := 1.25 mm
Travel := 4.702 mm
Motor_steps := 2048
Totality := ((4*60) + 6.4) s = 4.10667 min
((Travel/Pitch)/Totality)*Motor_steps = 31.2652 1/s
